// pandas.glm
//
// Include this GLM file to enable pandas players and recorders
//

module gld_pandas;

class recorder
{
	char1024 property;
	char1024 file;
	double interval[s];

	on_init "python:gld_pandas.recorder_init";
	on_commit "python:gld_pandas.recorder_commit";
}

class player
{
	char1024 property;
	char1024 file;
	char32 timezone;

	on_init "python:gld_pandas.player_init";
	on_precommit "python:gld_pandas.player_precommit";
}
